*Preprint, echo=NO, model=No, history=NO, contact=NO
*Heading
****************************************************
*node
1, 0, 0, 0
307, 0, 0, 16
18, 0, 16, 0
324, 0, 16, 16
5509, 16, 0, 0
5815, 16, 0, 16
5526, 16, 16, 0
5832, 16, 16, 16
*****************************************************
*NSET, NSET=A
 1
*NSET, NSET=B
 307
*NSET, NSET=C
 18
*NSET, NSET=D
 324
*NSET, NSET=E
 5509
*NSET, NSET=F
 5815
*NSET, NSET=G
 5526
*NSET, NSET=H
 5832
****************************************************
*Nfill, Nset=AB
A, B, 17, 18
*Nfill, Nset=CD
C, D, 17, 18
*Nfill, Nset=ABCD
AB, CD, 17, 1
*Nfill, Nset=EF
E, F, 17, 18
*Nfill, Nset=GH
G, H, 17, 18
*Nfill, Nset=EFGH
EF, GH, 17, 1
*Nfill, Nset=ABCDEFGH
ABCD, EFGH, 17, 324
****************************************************
*Nfill, Nset=BD
B, D, 17, 1
*Nfill, Nset=FH
F, H, 17, 1
*Nfill, Nset=BDFH
BD, FH, 17, 324
*****************************************************
** Bottom Face Node Set
*Nfill, Nset=AC
A, C, 17, 1
*Nfill, Nset=EG
E, G, 17, 1
*Nfill, Nset=ACEG
AC, EG, 17, 324
*****************************************************
*ELEMENT, TYPE=C3D8
1,1,2,20,19,325,326,344,343
*****************************************************
*ELGEN, elset=allel
1,17,1,1,17,18,17,17,324,289
*****************************************************
*ELSET, ELSET=elset1
2457,
*****************************************************
*ELSET, ELSET=elset2
1,   2,   3,   4,   5,   6
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
*****************************************************
*NSET, NSET=n1plus
5528,   5529,   5530,   5531,   5532,   5533
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
*****************************************************
*NSET, NSET=n1minus
20,   21,   22,   23,   24,   25
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
*****************************************************
*NSET, NSET=n2minus
343,   361,   379,   397,   415,   433
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
*****************************************************
*NSET, NSET=n2plus
360,   378,   396,   414,   432,   450
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
*****************************************************
*NSET, NSET=n2minus
343,   361,   379,   397,   415,   433
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
*****************************************************
*NSET, NSET=n3minus
326,   327,   328,   329,   330,   331
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
*****************************************************
*NSET, NSET=n3plus
632,   633,   634,   635,   636,   637
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
*****************************************************
*NSET, NSET=n3minus_n1minus
2,   3,   4,   5,   6,   7,   8,   9,   10,   11,   12,   13,   14,   15,   16,   17,

*****************************************************
*NSET, NSET=n3minus_n1plus
5510,   5511,   5512,   5513,   5514,   5515,   5516,   5517,   5518,   5519,   5520,   5521,   5522,   5523,   5524,   5525,

*****************************************************
*NSET, NSET=n2minus_n3minus
325,   649,   973,   1297,   1621,   1945,   2269,   2593,   2917,   3241,   3565,   3889,   4213,   4537,   4861,   5185,

*****************************************************
*NSET, NSET=n2plus_n3minus
342,   666,   990,   1314,   1638,   1962,   2286,   2610,   2934,   3258,   3582,   3906,   4230,   4554,   4878,   5202,

*****************************************************
*NSET, NSET=n3plus_n1minus
308,   309,   310,   311,   312,   313,   314,   315,   316,   317,   318,   319,   320,   321,   322,   323,

*****************************************************
*NSET, NSET=n3plus_n1plus
5816,   5817,   5818,   5819,   5820,   5821,   5822,   5823,   5824,   5825,   5826,   5827,   5828,   5829,   5830,   5831,

*****************************************************
*NSET, NSET=n2minus_n3plus
631,   955,   1279,   1603,   1927,   2251,   2575,   2899,   3223,   3547,   3871,   4195,   4519,   4843,   5167,   5491,

*****************************************************
*NSET, NSET=n2plus_n3plus
648,   972,   1296,   1620,   1944,   2268,   2592,   2916,   3240,   3564,   3888,   4212,   4536,   4860,   5184,   5508,

*****************************************************
*NSET, NSET=n1plus_n2minus
5527,   5545,   5563,   5581,   5599,   5617,   5635,   5653,   5671,   5689,   5707,   5725,   5743,   5761,   5779,   5797,

*****************************************************
*NSET, NSET=n1plus_n2plus
5544,   5562,   5580,   5598,   5616,   5634,   5652,   5670,   5688,   5706,   5724,   5742,   5760,   5778,   5796,   5814,

*****************************************************
*NSET, NSET=n1minus_n2minus
19,   37,   55,   73,   91,   109,   127,   145,   163,   181,   199,   217,   235,   253,   271,   289,

*****************************************************
*NSET, NSET=n1minus_n2plus
36,   54,   72,   90,   108,   126,   144,   162,   180,   198,   216,   234,   252,   270,   288,   306,

*****************************************************
** Implement Periodic Boundary Conditions
*Equation
3
n1plus, 1, 1, n1minus, 1, -1, 5832, 1, -1
2
n1plus, 2, 1, n1minus, 2, -1
2
n1plus, 3, 1, n1minus, 3, -1
**
2
n2plus, 1, 1, n2minus, 1, -1
2
n2plus, 2, 1, n2minus, 2, -1
2
n2plus, 3, 1, n2minus, 3, -1
**
2
n3plus, 1, 1, n3minus, 1, -1
2
n3plus, 2, 1, n3minus, 2, -1
2
n3plus, 3, 1, n3minus, 3, -1
**
3
n1plus_n2plus, 1, 1, n1minus_n2plus, 1, -1, 5832, 1, -1
3
n1plus_n2minus, 1, 1, n1minus_n2minus, 1, -1, 5832, 1, -1
2
n1minus_n2plus, 1, 1, n1minus_n2minus, 1, -1
**
2
n1plus_n2plus, 2, 1, n1minus_n2plus, 2, -1
2
n1plus_n2minus, 2, 1, n1minus_n2minus, 2, -1
2
n1minus_n2plus, 2, 1, n1minus_n2minus, 2, -1
**
2
n1plus_n2plus, 3, 1, n1minus_n2plus, 3, -1
2
n1plus_n2minus, 3, 1, n1minus_n2minus, 3, -1
2
n1minus_n2plus, 3, 1, n1minus_n2minus, 3, -1
**
**
3
n3plus_n1plus, 1, 1, n3plus_n1minus, 1, -1, 5832, 1, -1
3
n3minus_n1plus, 1, 1, n3minus_n1minus, 1, -1, 5832, 1, -1
2
n3plus_n1minus, 1, 1, n3minus_n1minus, 1, -1
**
2
n3plus_n1plus, 2, 1, n3plus_n1minus, 2, -1
2
n3minus_n1plus, 2, 1, n3minus_n1minus, 2, -1
2
n3plus_n1minus, 2, 1, n3minus_n1minus, 2, -1
**
2
n3plus_n1plus, 3, 1, n3plus_n1minus, 3, -1
2
n3minus_n1plus, 3, 1, n3minus_n1minus, 3, -1
2
n3plus_n1minus, 3, 1, n3minus_n1minus, 3, -1
**
**
2
n2plus_n3plus, 1, 1, n2minus_n3plus, 1, -1
2
n2plus_n3minus, 1, 1, n2minus_n3minus, 1, -1
2
n2minus_n3plus, 1, 1, n2minus_n3minus, 1, -1
**
2
n2plus_n3plus, 2, 1, n2minus_n3plus, 2, -1
2
n2plus_n3minus, 2, 1, n2minus_n3minus, 2, -1
2
n2minus_n3plus, 2, 1, n2minus_n3minus, 2, -1
**
2
n2plus_n3plus, 3, 1, n2minus_n3plus, 3, -1
2
n2plus_n3minus, 3, 1, n2minus_n3minus, 3, -1
2
n2minus_n3plus, 3, 1, n2minus_n3minus, 3, -1
**** -----------------------------------------------------------------
** MATERIALS
**
*Solid Section, elset=elset1, material=material-1
*Material, name=material-1
*Elastic, moduli=Long Term
120, 0.3
*Viscoelastic, Time=Prony
0.0769, 0.0769, 0.75
** Solid (element 2 = elset2)
**
*Solid Section, elset=elset2, material=material-2
**
*Material, name=material-2
*Elastic, moduli=Long Term
80, 0.3
*Viscoelastic, Time=Prony
0.2, 0.2, 1.5
** ----------------------------------------------------------------
**
** ----------------------------------------------------------------
**
*Amplitude, Name=disp1, Definition=Tabular
0,10
10,10
*Step, Amplitude=Ramp, name=Step-1,  nlgeom=YES, inc=1000000
*Visco
0.5,10,1e-05,0.5
** Name: BC-1 Type: Displacement/Rotation
*Boundary, Amplitude=disp1
**
1,1,3,0
307,1,3,0
18,1,3,0
324,1,3,0
5509,1,1,0.001
5815,1,1,0.001
5526,1,1,0.001
5832,1,1,0.001
5509,2,3,0
5815,2,3,0
5526,2,3,0
5832,2,3,0
**
** OUTPUT REQUESTS
**
*output, field, frequency=0
**
*output, history, frequency=0
**
*el print, summary=no, totals=yes
S11
*End Step
*Amplitude, Name=disp2, Definition=Tabular
0,10
10,10
*Step, Amplitude=Ramp, name=Step-2,  nlgeom=YES, inc=1000000
*Visco
0.5,10,1e-05,0.5
** Name: BC-1 Type: Displacement/Rotation
*Boundary, Amplitude=disp2
**
1,1,3,0
307,1,3,0
18,1,3,0
324,1,3,0
5509,1,1,-0.002
5815,1,1,-0.002
5526,1,1,-0.002
5832,1,1,-0.002
5509,2,3,0
5815,2,3,0
5526,2,3,0
5832,2,3,0
**
** OUTPUT REQUESTS
**
*output, field, frequency=0
**
*output, history, frequency=0
**
*el print, summary=no, totals=yes
S11
*End Step
